// COMSOL Multiphysics 5.6.0.401 model "HexCellTMn2FocusElectrode.mph"
// HexCellTMnFocusElectrode
// Outline of the model tree

Parameters
  HexCell_width = 5[mm]  // Hex cell width (edge)
  HexCell_height = 20[mm]  // Hex cell height
  Chip_width = 6[mm]  // Topmetal Chip width
  Chip_length = 5[mm]  // Topmetal Chip length
  Chip_thickness = 0.71[mm]  // Topmetal Chip thickness
  ChipSubstrate_thickness = 0.7[mm]  // thickness of silicon substrate
  TMElectrode_thickness = 0.01[mm]  // thickness of the TM Electrode
  TMElectrode_diameter = 1[mm]  // diameter of the TM Electrode
  TMElectrode_x = 0.0[mm]  // x position of TM electrode
  TMElectrode_y = 0.0[mm]  // y position of TM electrode
  TMElectrode_insulator_opening_diameter = 0.8[mm]  // Opening in the passivation layer for TM Electrode
  FocusElectrode_thickness = 0.1[mm]  // thickness of focusing electrode
  FocusElectrodeHole_diameter = 2.0[mm]  // hole diameter of the focusing electrode
  FocusElectrode2Hole_diameter = 5[mm]  // hole diameter of the 2nd focusing electrode
  TM_FocusElectrode_d = 2[mm]  // distance between top surface of TM electrode and bottom surface of focusing electrode
  FocusElectrode2_z = 5[mm]  // distance between 1st and 2nd focusing electrodes
  BondingWire_diameter = 0.05[mm]  // diameter of bonding wire
  BondingWire_pitch = 0.2[mm]  // pitch between adjacent bonding wires
  BondingWire_Chip_d = 0.05[mm]  // distance of bonding wire from the edge of Chip
  V_TMElectrode = 0.5[V]  // voltage on TM electrode
  V_FocusElectrode = -1000[V]  // voltage on focusing electrode
  V_FocusElectrode2 = -3250[V]  // voltage on 2nd focusing electrode
  V_Cathode = -5000[V]  // voltage on cathode
  TMElectrode_mesh_min = 0.005[mm]  // electrode minimum mesh
  TMElectrode_mesh_max = 0.1[mm]  // electrode maximum mesh
  FocusElectrode_mesh_min = 0.05[mm]  // mesh minimum
  FocusElectrode_mesh_max = 1[mm]  // mesh maximum

Selections
  sel3: Explicit "TMElectrode" on domains 44
  sel7: Explicit "Bonding wires" on domains 4-41, 45-82
  sel1: Explicit "Focusing Electrode" on domains 2
  sel14: Explicit "Focusing Electrode 2" on domains 3
  sel2: Explicit "Silicon Substrate" on domains 42, 44
  sel8: Explicit "Passivation layer" on domains 43
  sel12: Explicit "Metal" on domains 2-41, 44-82
  com2: Complement "Gas volume" | entitydim = 3; input = {sel3, sel7, sel1, sel14, sel2, sel8}
  sel9: Explicit "TMELectrode Boundaries" on boundaries adjacent to domains 44
  sel10: Explicit "Bonding wire Boundaries" on boundaries adjacent to domains 4-41, 45-82
  sel11: Explicit "Focusing Electrode Boundaries" on boundaries adjacent to domains 2
  sel13: Explicit "Focusing Electrode 2 Boundaries" on boundaries adjacent to domains 3
  es2_dst_pc2: Explicit on boundaries 245, 247, 249
  es2_dst_pc1: Explicit "Explicit 1a" on boundaries 250, 252, 254
  es1_dst_pc1: Explicit on boundaries 250, 252, 254
  es1_dst_pc2: Explicit on boundaries 245, 247, 249
  es1_dst_pc3: Explicit on boundaries 223, 225, 227
  es2_dst_pc3: Explicit "Explicit 3a" on boundaries 223, 225, 227

Coordinate systems
  sys1: Boundary "Boundary System 1"

Geometry
  geom1 "Geometry 1" (3D, length unit mm)
    wp1: WorkPlane | unite = on; workplane3d = on
      b1: BezierPolygon "unit cell"
        p = 
          {-HexCell_width, -HexCell_width/2.0, HexCell_width/2.0, HexCell_width, HexCell_width/2.0, -HexCell_width/2.0, -HexCell_width}
          {0, HexCell_width/2*sqrt(3), HexCell_width/2*sqrt(3), 0, -HexCell_width/2.0*sqrt(3), -HexCell_width/2*sqrt(3), 0}
        degree = {1, 1, 1, 1, 1, 1}
        w = {1, 1, 1, 1, 1, 1, 1, 1, 1, 1, 1, 1}
    ext4: Extrude "World" | workplane = wp1; input = wp1; inputface = wp1.b1 boundaries 1; distance = HexCell_height
    wp2: WorkPlane | unite = on; workplane3d = on
      r1: Rectangle | base = center; size = {Chip_width, Chip_length}
    ext1: Extrude "Topmetal Chip" | workplane = wp2; input = wp2; distance = Chip_thickness
    wp7: WorkPlane | unite = on
      r1: Rectangle | base = center; size = {Chip_width, Chip_length}
    ext6: Extrude "Silicon Substrate"
      workplane = wp7
      input = wp7
      inputface = ext4(1) boundaries 8
      inputhandling = keep
      distance = ChipSubstrate_thickness
    wp3: WorkPlane | quickz = ChipSubstrate_thickness-TMElectrode_thickness; unite = on; workplane3d = on
      c1: Circle | pos = {TMElectrode_x, TMElectrode_y}; r = TMElectrode_diameter/2.0
    ext3: Extrude "TMElectrode" | workplane = wp3; input = wp3; distance = TMElectrode_thickness
    wp8: WorkPlane | quickz = ChipSubstrate_thickness; unite = on; workplane3d = on
      c1: Circle | pos = {TMElectrode_x, TMElectrode_y}; r = TMElectrode_insulator_opening_diameter/2.0
    ext7: Extrude "TMElectrode Opening" | workplane = wp8; input = wp8; distance = Chip_thickness-ChipSubstrate_thickness
    dif1: Difference "Topmetal Chip with Opening" | input = ext1; input2 = ext7
    wp4: WorkPlane | quickz = ChipSubstrate_thickness+TM_FocusElectrode_d; unite = on
      b2: BezierPolygon "Focusing Electrode Cell"
        p = 
          {-HexCell_width, -HexCell_width/2.0, HexCell_width/2.0, HexCell_width, HexCell_width/2.0, -HexCell_width/2.0, -HexCell_width}
          {0, HexCell_width/2*sqrt(3), HexCell_width/2*sqrt(3), 0, -HexCell_width/2.0*sqrt(3), -HexCell_width/2*sqrt(3), 0}
        degree = {1, 1, 1, 1, 1, 1}
        w = {1, 1, 1, 1, 1, 1, 1, 1, 1, 1, 1, 1}
      c1: Circle "Focusing Electrode Hole" | pos = {TMElectrode_x, TMElectrode_y}; r = FocusElectrodeHole_diameter/2
      dif1: Difference "Focusing Electrode Unit" | input = b2; input2 = c1
    ext5: Extrude "Focusing Electrode" | workplane = wp4; input = wp4; distance = FocusElectrode_thickness
    wp9: WorkPlane | quickz = FocusElectrode2_z; unite = on
      b2: BezierPolygon "Focusing Electrode Cell"
        p = 
          {-HexCell_width, -HexCell_width/2.0, HexCell_width/2.0, HexCell_width, HexCell_width/2.0, -HexCell_width/2.0, -HexCell_width}
          {0, HexCell_width/2*sqrt(3), HexCell_width/2*sqrt(3), 0, -HexCell_width/2.0*sqrt(3), -HexCell_width/2*sqrt(3), 0}
        degree = {1, 1, 1, 1, 1, 1}
        w = {1, 1, 1, 1, 1, 1, 1, 1, 1, 1, 1, 1}
      c1: Circle "Focusing Electrode Hole" | pos = {TMElectrode_x, TMElectrode_y}; r = FocusElectrode2Hole_diameter/2
      dif1: Difference "Focusing Electrode Unit" | input = b2; input2 = c1
    ext8: Extrude "Focusing Electrode 2" | workplane = wp9; input = wp9; distance = FocusElectrode_thickness
    wp5: WorkPlane | quickz = Chip_thickness; unite = on
      c1: Circle | pos = {-Chip_width/2 + BondingWire_Chip_d, 0}; r = BondingWire_diameter/2
    wp6: WorkPlane | quickplane = xz; unite = on
      b1: BezierPolygon "Bézier Polygon 1"
        p = 
          {-Chip_width/2 + BondingWire_Chip_d, -Chip_width/2 +BondingWire_Chip_d-0.2, -Chip_width/2 +BondingWire_Chip_d-0.4, -Chip_width/2 +BondingWire_Chip_d-0.6, -Chip_width/2 +BondingWire_Chip_d-0.6}
          {Chip_thickness, Chip_thickness+0.4, Chip_thickness, Chip_thickness/2, 0}
        degree = {2, 2}
        w = {1, 0.5, 1, 1, 1/sqrt(2), 1}
        type = open
    swe1: Sweep "bonding wire"
      face = wp5.c1 boundaries 1
      edge = wp6.b1 edges 1, 2
      diredge = wp6.b1 edges 1
      parameterization = internal
    arr1: Array "Array Bonding Wire"
      input = swe1
      size = 10
      type = linear
      linearsize = 10
      fullsize = {0, 1, 0}
      displ = {0, BondingWire_pitch, 0}
    mir1: Mirror "Mirror Bonding Wire" | input = arr1; keep = on; axis = {0, 1, 0}
    mir2: Mirror "Mirror Bonding Wire 2" | input = arr1, mir1; keep = on; axis = {1, 0, 0}
    fin: Finalize "Form Union"

Materials
  mat1: Common "Aluminum" on selection sel12
    def "Basic"
      relpermeability = 1
      heatcapacity = 900[J/(kg*K)]
      thermalconductivity = 238[W/(m*K)]
      electricconductivity = 3.774e7[S/m]
      relpermittivity = 1
      thermalexpansioncoefficient = 23e-6[1/K]
      density = 2700[kg/m^3]
    Enu "Young's modulus and Poisson's ratio"
      youngsmodulus = 70e9[Pa]
      poissonsratio = 0.33
    Murnaghan
      l = -2.5e11[Pa]
      m = -3.3e11[Pa]
      n = -3.5e11[Pa]
    Lame "Lamé parameters"
      lambLame = 5.1e10[Pa]
      muLame = 2.6e10[Pa]
  mat2: Common "Silicon" on selection sel2
    def "Basic"
      relpermeability = 1
      electricconductivity = 1e-12[S/m]
      thermalexpansioncoefficient = 2.6e-6[1/K]
      heatcapacity = 700[J/(kg*K)]
      relpermittivity = 11.7
      density = 2329[kg/m^3]
      thermalconductivity = 130[W/(m*K)]
    Enu "Young's modulus and Poisson's ratio"
      youngsmodulus = 170e9[Pa]
      poissonsratio = 0.28
    RefractiveIndex
      n = 3.48
      ki = 0
  mat3: Common "Gas" on selection com2
    def "Basic"
      relpermeability = 1
      relpermittivity = 1
      dynamicviscosity = eta(T[1/K])[Pa*s]
      ratioofspecificheat = 1.4
      electricconductivity = 0[S/m]
      heatcapacity = Cp(T[1/K])[J/(kg*K)]
      density = rho(pA[1/Pa],T[1/K])[kg/m^3]
      thermalconductivity = k(T[1/K])[W/(m*K)]
      soundspeed = cs(T[1/K])[m/s]
  mat4: Common "Insulator" on selection sel8
    def "Basic"
      relpermittivity = 4

Physics
  es1: Electrostatics "Electric (drift) field" on all domains
    dependent variable V1
    PortSweepSettings.PortParamName = PortName
    ccn1: ChargeConservation (default) | minput_numberdensity = 0
    zc1: ZeroCharge (default)
    init1: init "Initial Values" (default)
    pot1: ElectricPotential "V Cathode" on boundaries 16 | V0 = V_Cathode
    pot2: ElectricPotential "V TMElectrode" on selection sel9 | V0 = V_TMElectrode
    pot3: ElectricPotential "V Focusing Electrode" on selection sel11 | V0 = V_FocusElectrode
    pot4: ElectricPotential "V Focusing Electrode 2" on selection sel13 | V0 = V_FocusElectrode2
    gnd2: Ground "Bonding wires on gnd" on selection sel10
    gnd3: Ground "PCB on gnd" on boundaries 3, 190
    pc1: PeriodicCondition on boundaries 1, 7, 13, 250, 252, 254 | destinationDomains: boundaries 250, 252, 254
    pc2: PeriodicCondition on boundaries 2, 8, 14, 245, 247, 249 | destinationDomains: boundaries 245, 247, 249
    pc3: PeriodicCondition on boundaries 216, 218, 220, 223, 225, 227 | destinationDomains: boundaries 223, 225, 227
  es2: Electrostatics "Weighting field" on all domains
    dependent variable V1
    PortSweepSettings.PortParamName = PortName
    ccn1: ChargeConservation (default) | minput_numberdensity = 0
    zc1: ZeroCharge (default)
    init1: init "Initial Values" (default)
    pot4: ElectricPotential "V Cathode" on boundaries 16
    pot5: ElectricPotential "V TMElectrode" on selection sel9 | V0 = 1.0
    pot6: ElectricPotential "V Focusing Electrode" on selection sel11
    pot7: ElectricPotential "V Focusing Electrode 2" on selection sel13
    gnd4: Ground "Bonding wires on gnd" on selection sel10
    gnd5: Ground "PCB on gnd" on boundaries 3, 190
    pc1: PeriodicCondition on boundaries 1, 7, 13, 250, 252, 254 | destinationDomains: boundaries 250, 252, 254
    pc2: PeriodicCondition on boundaries 2, 8, 14, 245, 247, 249 | destinationDomains: boundaries 245, 247, 249
    pc3: PeriodicCondition on boundaries 216, 218, 220, 223, 225, 227 | destinationDomains: boundaries 223, 225, 227

Mesh
  mesh1 "Mesh 1"
    size: MeshSizeDefault | hauto = 4
    ftet2: FreeTet "Free Tetrahedral 1" on all domains | method = dellegacy52
      size3: Size on selection sel3 | hmax = TMElectrode_mesh_max; hmin = TMElectrode_mesh_min; hauto = 2; custom = on
      size1: Size on selection sel1 | hmax = FocusElectrode_mesh_max; hmin = FocusElectrode_mesh_min; custom = on
      size4: Size on domains 3 | hmax = FocusElectrode_mesh_max; hmin = FocusElectrode_mesh_min; custom = on

Studies
  std1 "Study Electric (drift) field"
    stat: Stationary | solve for = {es1}
  std2 "Study Weighting field"
    stat: Stationary | solve for = {es2}

Solver configurations
  sol1 "Solution 1" (study std1)
    v1: Variables "Dependent Variables 1"
    s1: Stationary "Stationary Solver 1"
      fc1: FullyCoupled
      i1: Iterative | linsolver = cg
        mg1: Multigrid | prefun = amg
  sol2 "Solution 2" (study std2)
    // same settings as sol1

Datasets
  dset1: Solution | solution = sol1
  dset2: Solution | solution = sol2
  cpl1: CutPlane | data = dset1

Plots
  pg1: PlotGroup3D "Electric (drift) field" | data = dset1
    mslc1: Multislice | data = dset1; expr = es1.normE; znumber = 0
    str1: Streamline
      expr = {-es1.Ex, -es1.Ey, -es1.Ez}
      startmethod = coord
      xcoord = -2.35, -1.82778, -1.30556, -0.783333, -0.261111, 0.261111, 0.783333, 1.30556, 1.82778, 2.35,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
      ycoord = -4.07032, -4.07032, -4.07032, -4.07032, -4.07032, -4.07032, -4.07032, -4.07032, -4.07032, -4.07032,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
      zcoord = 19.9
      back = off
  pg2: PlotGroup3D "Weighting field" | data = dset1
    mslc1: Multislice | data = dset2; expr = es2.normE; descr = Weighting field; znumber = 0
    str1: Streamline (disabled)
      data = dset1
      expr = {-es2.Ex, -es2.Ey, -es2.Ez}
      startmethod = coord
      xcoord = -2.35, -1.82778, -1.30556, -0.783333, -0.261111, 0.261111, 0.783333, 1.30556, 1.82778, 2.35,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
      ycoord = -4.07032, -4.07032, -4.07032, -4.07032, -4.07032, -4.07032, -4.07032, -4.07032, -4.07032, -4.07032,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
      zcoord = 19.9
      back = off
  pg3: PlotGroup2D "2D Plot Group 1" | data = cpl1
    surf1: Surface | expr = es1.normE
    arws1: ArrowSurface | expr = {es1.Ex, es1.Ey}; xnumber = 50; ynumber = 50; arrowlength = normalized
  pg4: PlotGroup3D "Electric Potential (es2)" | data = dset2
    mslc1: Multislice | expr = V1

Exports
  plot1: Plot "Streamline" | filename = sl.dat