// COMSOL Multiphysics 6.0.0.318 model "PixelFieldSimFEM.mph"
// Outline of the model tree

Parameters
  etd = 1.0  // electrode diameter
  pitch = 5  // pixel pitch
  gww = 0.100  // grid wire width
  mtt = 0.050  // metal trace thickness
  dcth = 0.040  // dielectric coating thickness
  subth = 1.6  // substrate thickness
  drifth = 20.0  // drift length
  Vcat = -1000  // Cathode voltage
  Vg = -100  // Gring voltage
  Vc = 1  // Center electrode voltage
  Voe = 0  // Outer electrodes voltage

Selections
  sel1: Explicit "Gring" on domains 2, 3, 5, 6, 13-18, 28-31
  sel2: Explicit "OuterElectrodes" on domains 9-12, 22, 23, 26, 27, 34-37
  sel3: Explicit "CenterElectrode" on domains 24, 25
  sel4: Explicit "CenterElectrodeBoundary" on boundaries 159-163, 165, 177-180
  sel5: Explicit "GringBoundary" on boundaries 4-9, 12, 16-21, 24-26, 28, 29, 31, 32, 34, 35, 38, 39, 41, 42, 44, 45, 47-54, 77-84, 86-91, 93-100, 102-107, 109-111, 113, 114, 116, 117, 119, 120, 122, 123, 125, 126, 129, 130, 132-135, 137, 138, 140-151, 185-196, 198, 199, 201-214, 216, 217, 219, 220, 222, 223, 225, 226, 228, 229, 232, 233, 235, 236, 238, 239, 241-248, 271-278, 280, 281, 285-288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
  sel6: Explicit "OuterElectrodesBoundary" on boundaries 55-76, 152-158, 166-176, 181-184, 249-270
  sel7: Explicit "DielectricChargeUpSurface" on boundaries 30, 36, 115, 121, 127, 224, 230

Geometry
  geom1 "UnitCell" (3D, length unit mm)
    wp2: WorkPlane | unite = on
      pol1: Polygon "OuterRim"
        source = table
        table = 
          {pitch/sqrt(3)*2, 0}
          {pitch/sqrt(3)*2.5, pitch/2}
          {pitch/sqrt(3)*2, pitch}
          {pitch/sqrt(3), pitch}
          {pitch/sqrt(3)/2, pitch*1.5}
          {-pitch/sqrt(3)/2, pitch*1.5}
          {-pitch/sqrt(3), pitch}
          {-pitch/sqrt(3)*2, pitch}
          {-pitch/sqrt(3)*2.5, pitch/2}
          {-pitch/sqrt(3)*2, 0}
          {-pitch/sqrt(3)*2.5, -pitch/2}
          {-pitch/sqrt(3)*2, -pitch}
          {-pitch/sqrt(3), -pitch}
          {-pitch/sqrt(3)/2, -pitch*1.5}
          {pitch/sqrt(3)/2, -pitch*1.5}
          {pitch/sqrt(3), -pitch}
          {pitch/sqrt(3)*2, -pitch}
          {pitch/sqrt(3)*2.5, -pitch/2}
    ext3: Extrude "DielectricCoating" | workplane = wp2; input = wp2; distance = dcth
    ext2: Extrude "Substrate" | extrudefrom = faces; workplane = wp2; inputface = ext3(1) boundaries 3; distance = subth
    ext4: Extrude "LAr" | extrudefrom = faces; inputface = ext2(1) boundaries 7; distance = drifth+mtt-dcth
    wp1: WorkPlane | unite = on
      c1: Circle "Electrode0" | r = etd/2.0
      pol1: Polygon "GringInner"
        source = table
        table = 
          {(pitch-gww)/sqrt(3), 0}
          {(pitch-gww)/2/sqrt(3), (pitch-gww)/2}
          {-(pitch-gww)/2/sqrt(3), (pitch-gww)/2}
          {-(pitch-gww)/sqrt(3), 0}
          {-(pitch-gww)/2/sqrt(3), -(pitch-gww)/2}
          {(pitch-gww)/2/sqrt(3), -(pitch-gww)/2}
      pol2: Polygon "GringMiddle"
        source = table
        table = 
          {(pitch)/sqrt(3), 0}
          {(pitch)/2/sqrt(3), (pitch)/2}
          {-(pitch)/2/sqrt(3), (pitch)/2}
          {-(pitch)/sqrt(3), 0}
          {-(pitch)/2/sqrt(3), -(pitch)/2}
          {(pitch)/2/sqrt(3), -(pitch)/2}
      dif1: Difference "GringHalf" | input = pol2; input2 = pol1
      copy1: Copy | input = c1, dif1; keep = on; displx = 0; disply = pitch
      copy2: Copy | input = c1, dif1; keep = on; displx = 0; disply = -pitch
      copy3: Copy | input = c1, dif1; keep = on; displx = pitch/2*sqrt(3); disply = pitch/2
      copy4: Copy | input = c1, dif1; keep = on; displx = -pitch/2*sqrt(3); disply = -pitch/2
      copy5: Copy | input = c1, dif1; keep = on; displx = pitch/2*sqrt(3); disply = -pitch/2
      copy6: Copy | input = c1, dif1; keep = on; displx = -pitch/2*sqrt(3); disply = pitch/2
    ext1: Extrude "MetalTraces" | workplane = wp1; input = wp1; distance = mtt
    fin: Finalize "Form Union"

Materials
  mat2: Common "Argon [liquid]" on all domains
    def "Basic"
      thermalconductivity = k_liquid_2(T[1/K])[W/(m*K)]
      thermalexpansioncoefficient = (alpha_liquid_2(T[1/K])[1/K]+(Tempref-84[K])*if(abs(T-Tempref)>1e-3,(alpha_liquid_2(T[1/K])[1/K]-alpha_liquid_2(Tempref[1/K])[1/K])/(T-Tempref),d(alpha_liquid_2(T[1/K])[1/K],T)))/(1+alpha_liquid_2(Tempref[1/K])[1/K]*(Tempref-84[K]))
      VP = VP_liquid_2(T[1/K])[Pa]
      density = rho_liquid_2(T[1/K])[kg/m^3]
      SurfF = SurfF(T[1/K])[N/m]
      relpermittivity = 1.53
      k_liquid_2: Piecewise
        arg = T
        pieces = 
          {84.0, 150.0, -0.4913615+0.02539981*T^1-3.654739E-4*T^2+2.212407E-6*T^3-4.980362E-9*T^4}
          {150.0, 151.0, 1.96601-0.01283333*T^1}
      alpha_liquid_2: Piecewise | arg = T; pieces = {84.0, 90.0, -0.00835593+2.165771E-4*T^1-1.181941E-6*T^2}
      VP_liquid_2: Piecewise | arg = T; pieces = {85.0, 150.0, (exp((-1.34498830e+02/T+3.02608000e+00*log10(T)-1.06230000e+00-2.58844100e+05/T^3)*log(10.0)))*1.33320000e+02}
      rho_liquid_2: Piecewise | arg = T; pieces = {84.0, 90.0, 1975.579-6.570351*T^1}
      SurfF: Piecewise | arg = T; pieces = {84.0, 92.0, 0.03434-2.5E-4*T^1}
    ThermalExpansion
      alphatan = 0
      dL = (dL_liquid_2(T[1/K])-dL_liquid_2(Tempref[1/K]))/(1+dL_liquid_2(Tempref[1/K]))
      dL_liquid_2: Piecewise | arg = T; pieces = {84.0, 90.0, -0.115065765+0.001186286*T^1+2.185054E-6*T^2}
  mat1: Common "Copper [solid,residual resistivity ratio of 100]" on domains 2, 3, 5, 6, 9-18, 22-31, 34-37
    def "Basic"
      thermalconductivity = k_solid_residual_resistivity_ratio_of_100_2(T[1/K])[W/(m*K)]
      thermalexpansioncoefficient = (alpha_solid_1(T[1/K])[1/K]+(Tempref-293[K])*if(abs(T-Tempref)>1e-3,(alpha_solid_1(T[1/K])[1/K]-alpha_solid_1(Tempref[1/K])[1/K])/(T-Tempref),d(alpha_solid_1(T[1/K])[1/K],T)))/(1+alpha_solid_1(Tempref[1/K])[1/K]*(Tempref-293[K]))
      heatcapacity = C_solid_1(T[1/K])[J/(kg*K)]
      HC = HC_solid_1(T[1/K])[J/(mol*K)]
      VP = VP_solid_1(T[1/K])[Pa]
      density = rho_solid_1(T[1/K])[kg/m^3]
      relpermittivity = 1
      k_solid_residual_resistivity_ratio_of_100_2: Piecewise
        arg = T
        pieces = 
          {1.0, 30.0, -22.5+135.0796*T^1+4.741986*T^2-0.3723024*T^3+0.004720439*T^4}
          {30.0, 40.0, 3933.429-63.68*T^1+0.05142857*T^2}
          {40.0, 70.0, 6328.994-201.2242*T^1+2.37446*T^2-0.009554548*T^3}
          {70.0, 100.0, 4760.0-147.1793*T^1+1.922369*T^2-0.01129286*T^3+2.488095E-5*T^4}
          {100.0, 300.0, 831.0-6.986667*T^1+0.04406667*T^2-1.253333E-4*T^3+1.333333E-7*T^4}
          {300.0, 1358.0, 528.9926-1.034752*T^1+0.003059339*T^2-4.399776E-6*T^3+2.929135E-9*T^4-7.326451E-13*T^5}
      alpha_solid_1: Piecewise
        arg = T
        pieces = 
          {4.0, 100.0, 1.104402E-5+4.812192E-8*T^1-1.223083E-10*T^2}
          {100.0, 210.0, 1.276495E-5+1.849516E-8*T^1+1.203963E-11*T^2-1.023671E-13*T^3}
          {210.0, 800.0, 1.47252E-5+8.137386E-9*T^1-4.58414E-12*T^2}
          {800.0, 1273.0, 1.83456E-5-1.577095E-9*T^1+1.908643E-12*T^2}
      C_solid_1: Piecewise
        arg = T
        pieces = 
          {1.0, 17.5, 0.00816805501+0.00104457033*T^1+0.00344121866*T^2+2.84703334E-4*T^3+2.24642893E-5*T^4}
          {17.5, 62.0, 29.059721-3.76716858*T^1+0.154053918*T^2-0.00104836396*T^3+3.01020641E-7*T^4}
          {62.0, 300.0, -215.281402+8.23639228*T^1-0.0473210818*T^2+1.29111169E-4*T^3-1.35703145E-7*T^4}
          {300.0, 1300.0, 342.764033+0.133834821*T^1+5.53525209E-5*T^2-1.97122089E-7*T^3+1.1407471E-10*T^4}
      HC_solid_1: Piecewise
        arg = T
        pieces = 
          {1.0, 17.5, 5.19047375E-4+6.63782814E-5*T^1+2.18675672E-4*T^2+1.80917583E-5*T^3+1.42751553E-6*T^4}
          {17.5, 62.0, 1.8466289-0.23938848*T^1+0.00978950982*T^2-6.66193216E-5*T^3+1.91286581E-8*T^4}
          {62.0, 300.0, -13.68027+0.523389949*T^1-0.00300706549*T^2+8.20449765E-6*T^3-8.62339136E-9*T^4}
          {300.0, 1300.0, 21.7812848+0.00850466618*T^1+3.51743148E-6*T^2-1.25263186E-8*T^3+7.24899338E-12*T^4}
      VP_solid_1: Piecewise | arg = T; pieces = {293.0, 1358.0, (exp((-1.77480000e+04/T-7.31700000e-01*log10(T)+1.20038100e+01)*log(10.0)))*1.33320000e+02}
      rho_solid_1: Piecewise
        arg = T
        pieces = 
          {4.0, 90.0, 9028.155+0.001936185*T^1-4.310034E-4*T^2-8.227902E-6*T^3}
          {90.0, 250.0, 9034.264-0.05885933*T^1-0.001406238*T^2+1.736657E-6*T^3}
          {250.0, 800.0, 9062.242-0.3913962*T^1-8.947644E-5*T^2}
          {800.0, 1273.0, 9038.962-0.3593546*T^1-9.31574E-5*T^2}
    ThermalExpansion
      alphatan = CTE_solid_1(T[1/K])[1/K]
      dL = (dL_solid_1(T[1/K])-dL_solid_1(Tempref[1/K]))/(1+dL_solid_1(Tempref[1/K]))
      dL_solid_1: Piecewise
        arg = T
        pieces = 
          {4.0, 80.0, -0.003272586-6.837087E-8*T^1+1.574823E-8*T^2+3.040518E-10*T^3}
          {80.0, 250.0, -0.003491523+2.12144E-6*T^1+5.197613E-8*T^2-6.339761E-11*T^3}
          {250.0, 800.0, -0.004355177+1.293125E-5*T^1+7.341229E-9*T^2-2.541027E-12*T^3}
          {800.0, 1273.0, -0.004359242+1.427188E-5*T^1+3.639858E-9*T^2}
      CTE_solid_1: Piecewise
        arg = T
        pieces = 
          {4.0, 13.0, -8.574809E-9+4.13567E-9*T^1-5.673583E-10*T^2+5.520915E-11*T^3}
          {13.0, 60.0, 2.194122E-7-2.662325E-8*T^1+4.800942E-10*T^2+6.093443E-11*T^3-6.195564E-13*T^4}
          {60.0, 250.0, -8.81E-6+3.292355E-7*T^1-1.773823E-9*T^2+4.545667E-12*T^3-4.483983E-15*T^4}
          {250.0, 800.0, 1.104756E-5+2.743089E-8*T^1-3.159431E-11*T^2+1.370433E-14*T^3}
    Enu "Young's modulus and Poisson's ratio"
      E = E(T[1/K])[Pa]
      nu = nu(T[1/K])
      E: Piecewise | arg = T; pieces = {4.0, 1330.0, 1.396274E11-5077626.0*T^1-191131.5*T^2+290.7333*T^3-0.2058552*T^4+5.385261E-5*T^5}
      nu: Piecewise
        arg = T
        pieces = 
          {4.0, 20.0, 0.3413951-9.643661E-5*T^1+2.151898E-6*T^2}
          {20.0, 1330.0, 0.339846+2.405498E-5*T^1}
    KG "Bulk modulus and shear modulus"
      K = kappa(T[1/K])[Pa]
      G = mu(T[1/K])[Pa]
      mu: Piecewise | arg = T; pieces = {4.0, 1330.0, 5.208306E10-2585817.0*T^1-71978.63*T^2+110.2355*T^3-0.07807297*T^4+2.043615E-5*T^5}
      kappa: Piecewise | arg = T; pieces = {4.0, 1330.0, 1.459784E11+4948257.0*T^1-132451.5*T^2+114.0737*T^3+0.02475104*T^4-9.178407E-5*T^5+3.51125E-8*T^6}
  mat3: Common "Teflon (polytetrafluoroethylene) [solid,molded sheet]" on domains 1, 7, 8, 19-21, 32, 33
    def "Basic"
      thermalconductivity = k(T[1/K])[W/(m*K)]
      Syt = Syt(T[1/K])[Pa]
      thermalexpansioncoefficient = (alpha(T[1/K])[1/K]+(Tempref-293[K])*if(abs(T-Tempref)>1e-3,(alpha(T[1/K])[1/K]-alpha(Tempref[1/K])[1/K])/(T-Tempref),d(alpha(T[1/K])[1/K],T)))/(1+alpha(Tempref[1/K])[1/K]*(Tempref-293[K]))
      heatcapacity = C_solid_molded_sheet_2(T[1/K])[J/(kg*K)]
      density = rho(T[1/K])[kg/m^3]
      TD = TD(T[1/K])[m^2/s]
      relpermittivity = 2.1
      k: Piecewise
        arg = T
        pieces = 
          {4.0, 30.0, -0.006797165+0.01613488*T^1-8.036141E-4*T^2+2.421845E-5*T^3-2.894615E-7*T^4}
          {30.0, 100.0, 0.03955475+0.006969912*T^1-1.043505E-4*T^2+7.745906E-7*T^3-2.242846E-9*T^4}
          {100.0, 300.0, 0.1855745+7.922488E-4*T^1-2.32512E-6*T^2+1.690809E-9*T^3+1.622105E-12*T^4}
      Syt: Piecewise | arg = T; pieces = {77.0, 295.0, 1.822676E8-1258166.0*T^1+3293.868*T^2-3.270733*T^3}
      alpha: Piecewise
        arg = T
        pieces = 
          {73.0, 273.0, 1.372266E-4-1.876725E-6*T^1+2.213158E-8*T^2-9.788765E-11*T^3+1.589176E-13*T^4}
          {273.0, 298.0, -0.1123094+0.001698848*T^1-9.542902E-6*T^2+2.358938E-8*T^3-2.161221E-11*T^4}
          {298.0, 323.0, 0.4942887-0.005826859*T^1+2.581986E-5*T^2-5.095458E-8*T^3+3.77841E-11*T^4}
          {323.0, 573.0, 0.004654487-4.013969E-5*T^1+1.329226E-7*T^2-1.952038E-10*T^3+1.080475E-13*T^4}
      C_solid_molded_sheet_2: Piecewise
        arg = T
        pieces = 
          {5.0, 28.0, 4.56428376-3.34113989*T^1+0.659757387*T^2-0.0195595975*T^3+1.91515152E-4*T^4}
          {28.0, 140.0, 6.04848245+4.00174203*T^1-0.00208491942*T^2}
          {140.0, 403.0, 248.359646-1.63870711*T^1+0.0426193118*T^2-1.38945787E-4*T^3+1.41327487E-7*T^4}
      rho: Piecewise
        arg = T
        pieces = 
          {73.0, 288.0, 2295.922-0.3590132*T^1+0.001638203*T^2-9.791582E-6*T^3+1.05619E-8*T^4}
          {288.0, 323.0, -333500.4+4439.005*T^1-21.96505*T^2+0.0482082*T^3-3.960752E-5*T^4}
          {323.0, 573.0, 561.6976+16.83484*T^1-0.06389383*T^2+1.038238E-4*T^3-6.453158E-8*T^4}
      TD: Piecewise
        arg = T
        pieces = 
          {84.0, 285.0, 8.05251E-7-9.110269E-9*T^1+5.200684E-11*T^2-1.441064E-13*T^3+1.562253E-16*T^4}
          {285.0, 303.0, 3.659084E-5-2.474033E-7*T^1+4.191667E-10*T^2}
          {303.0, 426.0, -4.499903E-6+4.901731E-8*T^1-1.943363E-10*T^2+3.413043E-13*T^3-2.247276E-16*T^4}
    ThermalExpansion
      alphatan = 1
      dL = (dL(T[1/K])-dL(Tempref[1/K]))/(1+dL(Tempref[1/K]))
      dL: Piecewise
        arg = T
        pieces = 
          {73.0, 288.0, -0.02031763+4.979161E-5*T^1-2.161434E-7*T^2+1.314618E-9*T^3-1.286022E-12*T^4}
          {288.0, 323.0, 51.805831-0.6849582*T^1+0.003388528*T^2-7.435378E-6*T^3+6.107539E-9*T^4}
          {323.0, 573.0, 0.3432939-0.003567985*T^1+1.34819E-5*T^2-2.20314E-8*T^3+1.373562E-11*T^4}
    Enu "Young's modulus and Poisson's ratio"
      E = E(T[1/K])[Pa]
      nu = 1
      E: Piecewise | arg = T; pieces = {4.0, 295.0, 6.898923E9-1.381493E7*T^1-106084.5*T^2+264.3545*T^3}

Physics
  es: Electrostatics on all domains
    dependent variable V
    ccn1: ChargeConservation (default)
    zc1: ZeroCharge (default)
    init1: init "Initial Values 1" (default)
    pot1: ElectricPotential "Electric Potential Cathode" on boundaries 13 | V0 = Vcat
    pot2: ElectricPotential "Electric Potential Center Electrode" on selection sel4 | V0 = Vc
    pot3: ElectricPotential "Electric Potential Gring" on selection sel5 | V0 = Vg
    pot4: ElectricPotential "Electric Potential Outer Electrodes" on selection sel6 | V0 = Voe
    gnd1: Ground on boundaries 3
    sca1: SurfaceChargeAccumulation (disabled) on selection sel7 | sigs0 = 10
    sfcd1: SurfaceChargeDensity on selection sel7 | rhoqs = 8e-7

Mesh
  mesh1 "Mesh 1" (physics-controlled)
    size: MeshSizeDefault | hauto = 3

Studies
  std1 "Study 1"
    stat: Stationary

Solver configurations
  sol1 "Solution 1" (study std1)
    v1: Variables "Dependent Variables 1"
    s1: Stationary "Stationary Solver 1"
      fc1: FullyCoupled
      i1: Iterative | linsolver = cg
        mg1: Multigrid | prefun = amg; coarseningmethod = classic

Datasets
  dset1: Solution | solution = sol1
  grid1: Grid3D
    source = data
    data = dset1
    parmin1 = -10
    parmax1 = 10
    parmin2 = -10
    parmax2 = 10
    parmin3 = -2
    parmax3 = 21
    res1 = 100
    res2 = 100
    res3 = 100
  cpl1: CutPlane | data = dset1

Plots
  pg2: PlotGroup2D "Electrostatic field 2D (es)" | data = cpl1
    surf1: Surface | expr = es.normE
    str1: Streamline
      planecoordsys = cartesian
      expr = {es.Ex, es.Ey, es.Ez}
      startmethod = coord
      xcoord = range(-10,0.2,10)
      ycoord = 20
  pg1: PlotGroup3D "Electrostatic field 3D (es)" | data = dset1
    slc1: Slice | expr = es.normE; descr = Electric potential; quickxnumber = 1
    str1: Streamline
      expr = {es.Ex, es.Ey, es.Ez}
      startmethod = coord
      xcoord = -2.35, -1.82778, -1.30556, -0.783333, -0.261111, 0.261111, 0.783333, 1.30556, 1.82778, 2.35,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
      ycoord = -4.07032, -4.07032, -4.07032, -4.07032, -4.07032, -4.07032, -4.07032, -4.07032, -4.07032, -4.07032,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
      zcoord = 20
    slc2: Slice | expr = es.normE; descr = Electric potential; quickplane = zx; quickynumber = 1